// COMSOL Multiphysics 5.4.0.388 model "outer_reflector_fluid.mph"
// Outline of the model tree

Parameters
  Ro = 1.65 [m]  // nominal outer radius
  Ri = 1.25 [m]  // inner radius
  dh = 0.02 [m]  // horizontal gap spacing
  Dc = 0.12 [m]  // coolant channel diameter
  Nb = 24  // number of reflector blocks
  theta = 2*pi/Nb  // total angle per block
  R_out = Ro-dh/2  // actual outer radius
  li = 0.175 [m]  // distance of coolant channel center to bed
  theta_b = theta-dh/(2*pi*Ri)  // solid angle per block
  Rn_i = Ri+0.355  // inner radius of back notch
  theta_s = (0.045[m] +dh)/(2*pi*R_out)  // solid angle of back slot
  Dh = 0.01 [m]  // horizontal channel diameter
  xc = -((Ri+li)*cos(theta/2.))  // coolant channel x coordinate
  yc = (Ri+li)*sin(theta/2.)  // coolant channel y coordinate
  H = 0.5 [m]  // nominal height of one block
  n_row = 6  // rows of horizontal channels
  n_col = 4  // columns of horizontal channels
  w = 0.01 [m]  // tolerance for horizontal channel cuts
  theta_1 = atan(-(Ri*sin(theta/n_col*1/2)-yc)/(-Ri*cos(theta/n_col*1/2)-xc))  // angle of edge column
  theta_2 = atan(-(Ri*sin(theta/n_col*3/2)-yc)/(-Ri*cos(theta/n_col*3/2)-xc))  // angle of center column
  theta_3 = atan((Ri*sin(theta/n_col*5/2)-yc)/(-Ri*cos(theta/n_col*5/2)-xc))  // angle of next center column
  theta_4 = atan(((Ri)*sin(theta/n_col*7/2)-yc)/(-Ri*cos(theta/n_col*7/2)-xc))  // angle of next edge column
  dv = 0.02 [m]  // vertical gap spacing
  Hb = H-dv  // actual block height
  theta_5 = (2*pi*Ro/Nb-dh/2)/Ro
  Vin = 0.01 [m/s]  // inlet vertical velocity
  Vc = 0.01 [m/s]  // inlet horizontal channel velocity

Geometry
  geom1 "Geometry 1" (3D, length unit m)
    cyl2: Cylinder "pebble bed" | r = Ri; h = H
    cyl3: Cylinder | r = Ro; h = H
    dif1: Difference | input = cyl3; input2 = cyl2
    blk1: Block | pos = {-Ro, 0, 0}; size = {2*Ro, Ro, H}
    int1: Intersection | input = blk1, dif1
    blk2: Block | pos = {-Ro*cos(theta), Ro*sin(theta), 0}; rot = -theta; size = {2*Ro, Ro, H}
    dif2: Difference | input = int1; input2 = blk2
    cyl5: Cylinder "coolant channel" | pos = {xc, yc, 0}; r = Dc/2.; h = H
    dif3: Difference | input = dif2; input2 = cyl5
    cyl6: Cylinder
      pos = {-Ri*cos(theta/n_col*1/2)+w*cos(theta_1), Ri*sin(theta/n_col*1/2)-w*sin(theta_1), H/n_row/2.}
      axis = {xc--Ri*cos(theta/n_col/2.), yc-Ri*sin(theta/n_col/2.), 0}
      axistype = cartesian
      r = Dh/2.
      h = li+w
    cyl7: Cylinder
      pos = {-Ri*cos(theta/n_col*3/2)+w*cos(theta_2), Ri*sin(theta/n_col*1.5)-w*sin(theta_2), H/n_row/2.}
      axis = {xc--(Ri)*cos(theta/n_col*1.5), yc-(Ri)*sin(theta/n_col*1.5), 0}
      axistype = cartesian
      r = Dh/2.
      h = li+w
    cyl8: Cylinder
      pos = {-Ri*cos(theta/n_col*5/2)+w*cos(theta_3), Ri*sin(theta/n_col*5/2.)+w*sin(theta_3), H/n_row/2.}
      axis = {xc--(Ri)*cos(theta/n_col*5/2.), yc-(Ri)*sin(theta/n_col*5/2.), 0}
      axistype = cartesian
      r = Dh/2.
      h = li+w
    cyl9: Cylinder
      pos = {-Ri*cos(theta/n_col*7/2)+w*cos(theta_4), (Ri)*sin(theta/n_col*7/2.)+w*sin(theta_4), H/n_row/2.}
      axis = {xc--(Ri)*cos(theta/n_col*7/2.), yc-(Ri)*sin(theta/n_col*7/2.), 0}
      axistype = cartesian
      r = Dh/2
      h = li+w
    cyl10: Cylinder
      pos = {-Ri*cos(theta/n_col*1/2)+w*cos(theta_1), Ri*sin(theta/n_col*1/2)-w*sin(theta_1), H/n_row*3/2.}
      axis = {xc--Ri*cos(theta/n_col/2.), yc-Ri*sin(theta/n_col/2.), 0}
      axistype = cartesian
      r = Dh/2.
      h = li+w
    cyl11: Cylinder
      pos = {-Ri*cos(theta/n_col*1/2)+w*cos(theta_1), Ri*sin(theta/n_col*1/2)-w*sin(theta_1), H/n_row*5/2.}
      axis = {xc--Ri*cos(theta/n_col/2.), yc-Ri*sin(theta/n_col/2.), 0}
      axistype = cartesian
      r = Dh/2.
      h = li+w
    cyl12: Cylinder
      pos = {-Ri*cos(theta/n_col*1/2)+w*cos(theta_1), Ri*sin(theta/n_col*1/2)-w*sin(theta_1), H/n_row*7/2.}
      axis = {xc--Ri*cos(theta/n_col/2.), yc-Ri*sin(theta/n_col/2.), 0}
      axistype = cartesian
      r = Dh/2.
      h = li+w
    cyl13: Cylinder
      pos = {-Ri*cos(theta/n_col*1/2)+w*cos(theta_1), Ri*sin(theta/n_col*1/2)-w*sin(theta_1), H/n_row*9/2.}
      axis = {xc--Ri*cos(theta/n_col/2.), yc-Ri*sin(theta/n_col/2.), 0}
      axistype = cartesian
      r = Dh/2.
      h = li+w
    cyl14: Cylinder
      pos = {-Ri*cos(theta/n_col*1/2)+w*cos(theta_1), Ri*sin(theta/n_col*1/2)-w*sin(theta_1), H/n_row*11/2.}
      axis = {xc--Ri*cos(theta/n_col/2.), yc-Ri*sin(theta/n_col/2.), 0}
      axistype = cartesian
      r = Dh/2.
      h = li+w
    cyl15: Cylinder
      pos = {-Ri*cos(theta/n_col*3/2)+w*cos(theta_2), Ri*sin(theta/n_col*1.5)-w*sin(theta_2), H/n_row*3/2}
      axis = {xc--(Ri)*cos(theta/n_col*1.5), yc-(Ri)*sin(theta/n_col*1.5), 0}
      axistype = cartesian
      r = Dh/2.
      h = li+w
    cyl16: Cylinder
      pos = {-Ri*cos(theta/n_col*3/2)+w*cos(theta_2), Ri*sin(theta/n_col*1.5)-w*sin(theta_2), H/n_row*5/2}
      axis = {xc--(Ri)*cos(theta/n_col*1.5), yc-(Ri)*sin(theta/n_col*1.5), 0}
      axistype = cartesian
      r = Dh/2.
      h = li+w
    cyl17: Cylinder
      pos = {-Ri*cos(theta/n_col*3/2)+w*cos(theta_2), Ri*sin(theta/n_col*1.5)-w*sin(theta_2), H/n_row*7/2}
      axis = {xc--(Ri)*cos(theta/n_col*1.5), yc-(Ri)*sin(theta/n_col*1.5), 0}
      axistype = cartesian
      r = Dh/2.
      h = li+w
    cyl18: Cylinder
      pos = {-Ri*cos(theta/n_col*3/2)+w*cos(theta_2), Ri*sin(theta/n_col*1.5)-w*sin(theta_2), H/n_row*9/2}
      axis = {xc--(Ri)*cos(theta/n_col*1.5), yc-(Ri)*sin(theta/n_col*1.5), 0}
      axistype = cartesian
      r = Dh/2.
      h = li+w
    cyl19: Cylinder
      pos = {-Ri*cos(theta/n_col*3/2)+w*cos(theta_2), Ri*sin(theta/n_col*1.5)-w*sin(theta_2), H/n_row*11/2}
      axis = {xc--(Ri)*cos(theta/n_col*1.5), yc-(Ri)*sin(theta/n_col*1.5), 0}
      axistype = cartesian
      r = Dh/2.
      h = li+w
    cyl20: Cylinder
      pos = {-Ri*cos(theta/n_col*5/2)+w*cos(theta_3), Ri*sin(theta/n_col*5/2.)+w*sin(theta_3), H/n_row*3/2}
      axis = {xc--(Ri)*cos(theta/n_col*5/2.), yc-(Ri)*sin(theta/n_col*5/2.), 0}
      axistype = cartesian
      r = Dh/2.
      h = li+w
    cyl21: Cylinder
      pos = {-Ri*cos(theta/n_col*5/2)+w*cos(theta_3), Ri*sin(theta/n_col*5/2.)+w*sin(theta_3), H/n_row*5/2}
      axis = {xc--(Ri)*cos(theta/n_col*5/2.), yc-(Ri)*sin(theta/n_col*5/2.), 0}
      axistype = cartesian
      r = Dh/2.
      h = li+w
    cyl22: Cylinder
      pos = {-Ri*cos(theta/n_col*5/2)+w*cos(theta_3), Ri*sin(theta/n_col*5/2.)+w*sin(theta_3), H/n_row*7/2}
      axis = {xc--(Ri)*cos(theta/n_col*5/2.), yc-(Ri)*sin(theta/n_col*5/2.), 0}
      axistype = cartesian
      r = Dh/2.
      h = li+w
    cyl23: Cylinder
      pos = {-Ri*cos(theta/n_col*5/2)+w*cos(theta_3), Ri*sin(theta/n_col*5/2.)+w*sin(theta_3), H/n_row*9/2}
      axis = {xc--(Ri)*cos(theta/n_col*5/2.), yc-(Ri)*sin(theta/n_col*5/2.), 0}
      axistype = cartesian
      r = Dh/2.
      h = li+w
    cyl24: Cylinder
      pos = {-Ri*cos(theta/n_col*5/2)+w*cos(theta_3), Ri*sin(theta/n_col*5/2.)+w*sin(theta_3), H/n_row*11/2}
      axis = {xc--(Ri)*cos(theta/n_col*5/2.), yc-(Ri)*sin(theta/n_col*5/2.), 0}
      axistype = cartesian
      r = Dh/2.
      h = li+w
    cyl25: Cylinder
      pos = {-Ri*cos(theta/n_col*7/2)+w*cos(theta_4), (Ri)*sin(theta/n_col*7/2.)+w*sin(theta_4), H/n_row*3/2}
      axis = {xc--(Ri)*cos(theta/n_col*7/2.), yc-(Ri)*sin(theta/n_col*7/2.), 0}
      axistype = cartesian
      r = Dh/2
      h = li+w
    cyl26: Cylinder
      pos = {-Ri*cos(theta/n_col*7/2)+w*cos(theta_4), (Ri)*sin(theta/n_col*7/2.)+w*sin(theta_4), H/n_row*5/2}
      axis = {xc--(Ri)*cos(theta/n_col*7/2.), yc-(Ri)*sin(theta/n_col*7/2.), 0}
      axistype = cartesian
      r = Dh/2
      h = li+w
    cyl27: Cylinder
      pos = {-Ri*cos(theta/n_col*7/2)+w*cos(theta_4), (Ri)*sin(theta/n_col*7/2.)+w*sin(theta_4), H/n_row*7/2}
      axis = {xc--(Ri)*cos(theta/n_col*7/2.), yc-(Ri)*sin(theta/n_col*7/2.), 0}
      axistype = cartesian
      r = Dh/2
      h = li+w
    cyl28: Cylinder
      pos = {-Ri*cos(theta/n_col*7/2)+w*cos(theta_4), (Ri)*sin(theta/n_col*7/2.)+w*sin(theta_4), H/n_row*9/2}
      axis = {xc--(Ri)*cos(theta/n_col*7/2.), yc-(Ri)*sin(theta/n_col*7/2.), 0}
      axistype = cartesian
      r = Dh/2
      h = li+w
    cyl29: Cylinder
      pos = {-Ri*cos(theta/n_col*7/2)+w*cos(theta_4), (Ri)*sin(theta/n_col*7/2.)+w*sin(theta_4), H/n_row*11/2}
      axis = {xc--(Ri)*cos(theta/n_col*7/2.), yc-(Ri)*sin(theta/n_col*7/2.), 0}
      axistype = cartesian
      r = Dh/2
      h = li+w
    dif4: Difference
      input = dif3
      input2 = cyl10, cyl11, cyl12, cyl13, cyl14, cyl15, cyl16, cyl17, cyl18, cyl19, cyl20, cyl21, cyl22, cyl23, cyl24, cyl25, cyl26, cyl27, cyl28, cyl29, cyl6, cyl7, cyl8, cyl9
    cyl30: Cylinder | type = surface; layername = Layer 1; layer = dh/2; r = Ro; h = H
    dif5: Difference | input = dif4; input2 = cyl30
    blk3: Block | pos = {-Ro-dh/2, -1+dh/2, 0}; size = {1, 1, 1}
    dif6: Difference | input = dif5; input2 = blk3
    blk4: Block | pos = {-Ro*cos(theta_5), Ro*sin(theta_5), 0}; rot = -theta; size = {1, 1, 1}
    dif7: Difference | input = dif6; input2 = blk4
    cyl31: Cylinder | r = Ro; h = dv/2
    cyl32: Cylinder | pos = {0, 0, H-dv/2}; r = Ro; h = dv/2
    dif8: Difference | input = dif7; input2 = cyl31, cyl32
    cyl33: Cylinder | type = surface; layername = Layer 1; layer = Ro-Ri; r = Ro; h = H
    blk5: Block | pos = {-Ro, -Ro, 0}; size = {2*Ro, Ro, 1}
    dif9: Difference | input = cyl33; input2 = blk5
    blk6: Block | pos = {-Ro*cos(theta), Ro*sin(theta), 0}; rot = -theta; size = {2*Ro, Ro, H}
    dif10: Difference | input = dif9; input2 = blk6
    dif11: Difference | input = dif10; input2 = dif8
    fin: Finalize "Form Union"

Materials
  mat1: Common "Air" on all domains
    def "Basic"
      thermalexpansioncoefficient = alpha_p(pA,T)
      molarmass = 0.02897
      bulkviscosity = muB(T)
      relpermeability = 1
      relpermittivity = 1
      dynamicviscosity = eta(T)
      ratioofspecificheat = 1.4
      electricconductivity = 0[S/m]
      heatcapacity = Cp(T)
      density = rho(pA,T)
      thermalconductivity = k(T)
      soundspeed = cs(T)
      eta: Piecewise | arg = T; pieces = {200.0, 1600.0, -8.38278E-7+8.35717342E-8*T^1-7.69429583E-11*T^2+4.6437266E-14*T^3-1.06585607E-17*T^4}; argunit = K; fununit = Pa*s
      Cp: Piecewise | arg = T; pieces = {200.0, 1600.0, 1047.63657-0.372589265*T^1+9.45304214E-4*T^2-6.02409443E-7*T^3+1.2858961E-10*T^4}; argunit = K; fununit = J/(kg*K)
      rho: Analytic | expr = pA*0.02897/R_const[K*mol/J]/T; args = {pA, T}; dermethod = manual; argders = {{pA, d(pA*0.02897/R_const/T,pA)}, {T, d(pA*0.02897/R_const/T,T)}}; argunit = Pa,K; fununit = kg/m^3
      k: Piecewise | arg = T; pieces = {200.0, 1600.0, -0.00227583562+1.15480022E-4*T^1-7.90252856E-8*T^2+4.11702505E-11*T^3-7.43864331E-15*T^4}; argunit = K; fununit = W/(m*K)
      cs: Analytic | expr = sqrt(1.4*R_const[K*mol/J]/0.02897*T); args = T; dermethod = manual; argunit = K; fununit = m/s
      an1: Analytic | funcname = alpha_p; expr = -1/rho(pA,T)*d(rho(pA,T),T); args = {pA, T}; argunit = Pa,K; fununit = 1/K
      an2: Analytic "Analytic 2a" | funcname = muB; expr = 0.6*eta(T); args = T; argunit = K; fununit = Pa*s
    RefractiveIndex
      n = 1
      ki = 0
    NonlinearModel
      BA = (def.gamma+1)/2

Physics
  spf: LaminarFlow "Turbulent Flow, Spalart-Allmaras" on all domains
    dependent variable u = {u, v, w}
    TurbulenceModelProperty.TurbulenceModelType = RANS
    TurbulenceModelProperty.TurbulenceModel = SpalartAllmaras
    fp1: FluidProperties (default)
    init1: init "Initial Values 1" (default)
    wallbc1: WallBC "Wall 1" (default)
    inl1: InletBoundary "Inlet 1" on boundaries 3 | ComponentWise = NormalInflowVelocity; U0in = Vin
    out1: OutletBoundary "Outlet 1" on boundaries 4
    sym1: Symmetry on boundaries 2, 9

Mesh
  mesh1 "Mesh 1"
    size: MeshSizeDefault | table = cfd; hmax = 0.0435; hmin = 0.013; hcurve = 0.7; hnarrow = 0.6; hgrad = 1.2; hauto = 6
    size1: Size on boundaries 5-8, 10-110
      table = cfd
      hmax = 0.023
      hmin = 0.00435
      hcurve = 0.5
      hnarrow = 0.8
      hgrad = 1.13
      hauto = 4
    cr1: CornerRefinement on no domains | boundary = boundaries 5-8, 10-110; minangle = 4.1888
    ftet1: FreeTet "Free Tetrahedral 1" on remaining entities
    bl1: BndLayer "Boundary Layers 1" on no domains
      sharpcorners = trim
      trimminangle = 4.1888
      trimmaxangle = 0.87266
      splitangle = 4.1888
      splitdivangle = 1.7453
      blp1: BndLayerProp "Boundary Layer Properties 1" on boundaries 5-8, 10-110
        blnlayers = 2
        blhminfact = 5
        blhmin = 0.005

Studies
  std1 "Study 1"
    stat: Stationary

Solver configurations
  sol1 "Solution 1" (study std1)
    v1: Variables "Dependent Variables 1"
    s1: Stationary "Stationary Solver 1"
      fc1: FullyCoupled | linsolver = i1; initstep = 0.01; minstep = 1.0E-6; maxiter = 100
      i1: Iterative "Algebraic Multigrid Solver (spf)" | nlinnormuse = on; maxlinit = 200; rhob = 20
        mg1: Multigrid | prefun = saamg; mgcycle = f; maxcoarsedof = 80000; strconn = 0.02; saamgcompwise = on

Datasets
  dset1: Solution | solution = sol1

Plots
  pg1: PlotGroup3D "3D Plot Group 1" | data = dset1
    vol1: Volume | expr = spf.U
    str1: Streamline
      expr = {u, v, w}
      selnumber = 400
      udist = 0.01
      linetype = ribbon
      widthscale = 0.002
      radiusexpr = 0.1